# OpenSim document version 40500
Model HOBLingApoorva-scaled:
  assembly_accuracy: 1e-7
  gravity: 0 -9.80665 0
  length_units: meters
  force_units: N
  credits:
    Arnold, E.M., Hamner, S.R., Ward, S.R., Lieber, R. L., and Delp, S.L.
  ActivationCoordinateActuator [values shared by the 7 below unless stated]: min_control=-10 max_control=10
      optimal_force=150 activation_time_constant=0.035 default_activation=0
  ActivationCoordinateActuator lumbarExtAct: coordinate=lumbar_extension
  ActivationCoordinateActuator lumbarBendAct: coordinate=lumbar_bending
  ActivationCoordinateActuator lumbarRotAct: coordinate=lumbar_rotation
  ActivationCoordinateActuator shoulder_flex_Actu_r: coordinate=arm_flex_r
  ActivationCoordinateActuator elbow_flex_Actu_r: coordinate=elbow_flex_r
  ActivationCoordinateActuator shoulder_flex_Actu_l: coordinate=arm_flex_l
  ActivationCoordinateActuator elbow_flex_Actu_l: coordinate=elbow_flex_l
  SmoothSphereHalfSpaceForce [values shared by the 8 below unless stated]: socket_half_space=/contactgeometryset/floor
      stiffness=10067776 [N/m^2] dissipation=1 [s/m] static_friction=0.8 dynamic_friction=0.8 viscous_friction=0.5
      transition_velocity=0.2 [m/s] hertz_smoothing=300 hunt_crossley_smoothing=50
  SmoothSphereHalfSpaceForce contactHeel_r: socket_sphere=/contactgeometryset/heel_r
  SmoothSphereHalfSpaceForce contactLateralMidfoot_r: socket_sphere=/contactgeometryset/lateralMidfoot_r
  SmoothSphereHalfSpaceForce contactMedialToe_r: socket_sphere=/contactgeometryset/medialToe_r
  SmoothSphereHalfSpaceForce contactMedialMidfoot_r: socket_sphere=/contactgeometryset/medialMidfoot_r
  SmoothSphereHalfSpaceForce contactHeel_l: socket_sphere=/contactgeometryset/heel_l
  SmoothSphereHalfSpaceForce contactLateralMidfoot_l: socket_sphere=/contactgeometryset/lateralMidfoot_l
  SmoothSphereHalfSpaceForce contactMedialToe_l: socket_sphere=/contactgeometryset/medialToe_l
  SmoothSphereHalfSpaceForce contactMedialMidfoot_l: socket_sphere=/contactgeometryset/medialMidfoot_l
      transition_velocity=0.21
  Ground
  BodySet:
    Body pelvis: mass=11.48671 [kg] mass_center=(-0.0790014 0 0) inertia=(0.1159374 0.1159374 0.05412274 0 0 0)
        meshes=(r_pelvis.vtp l_pelvis.vtp sacrum.vtp)
      WrapCylinder Gmax1_at_pelvis_r: xyz_body_rotation=(-0.6 0.45 0) translation=(-0.08604115 -0.09221285 0.07061256)
          quadrant=-x radius=0.04244174 length=0.1642763
      WrapCylinder Gmax2_at_pelvis_r: xyz_body_rotation=(-0.75 0.39 0) translation=(-0.0893934 -0.07730975 0.07871563)
          quadrant=all radius=0.04304063 length=0.1066002
      WrapCylinder Gmax3_at_pelvis_r: xyz_body_rotation=(-0.1 0 0) translation=(-0.09274521 -0.08196693 0.07871563)
          quadrant=all radius=0.04110271 length=0.1155418
      WrapCylinder Gmax1_at_pelvis_l: xyz_body_rotation=(0.6 -0.45 0) translation=(-0.08604115 -0.09221285 -0.07061256)
          quadrant=-x radius=0.04244174 length=0.1642763
      WrapCylinder Gmax2_at_pelvis_l: xyz_body_rotation=(0.75 -0.39 0) translation=(-0.0893934 -0.07730975 -0.07871563)
          quadrant=all radius=0.04304063 length=0.1066002
      WrapCylinder Gmax3_at_pelvis_l: xyz_body_rotation=(0.1 0 0) translation=(-0.09274521 -0.08196693 -0.07871563)
          quadrant=all radius=0.04110271 length=0.1155418
      WrapCylinder PS_at_brim_r: xyz_body_rotation=(-0.25 -0.27 0.1) translation=(-0.08268889 -0.05588652 0.07593739)
          quadrant=-y radius=0.05174911 length=0.1142889
      WrapCylinder PS_at_brim_l: xyz_body_rotation=(0.25 0.27 0.1) translation=(-0.08268889 -0.05588652 -0.07593739)
          quadrant=-y radius=0.05174911 length=0.1142889
      WrapCylinder IL_at_brim_r: xyz_body_rotation=(-0.32 -0.24 0.9) translation=(-0.07933664 -0.06054379 0.08751323)
          quadrant=-y radius=0.05726161 length=0.1135439
      WrapCylinder IL_at_brim_l: xyz_body_rotation=(0.32 0.24 0.9) translation=(-0.07933664 -0.06054379 -0.08751323)
          quadrant=-y radius=0.05726161 length=0.1135439
    Body femur_r: mass=9.072128 mass_center=(0 -0.1710703 0) inertia=(0.1202917 0.0289528 0.1202917 0 0 0)
        meshes=femur_r.vtp
      WrapCylinder Gastroc_at_condyles_r: translation=(0.00479178 -0.4125813 0) quadrant=all radius=0.02455815
          length=0.0958356
      WrapCylinder KnExt_at_fem_r: xyz_body_rotation=(-0.0623366 0.0507601 0)
          translation=(0.003438847 -0.4052672 0.002004024) quadrant=all radius=0.02455588 length=0.09585462
      WrapCylinder AB_at_femshaft_r: xyz_body_rotation=(1.66157 0.186644 0)
          translation=(0.01403361 -0.1133039 0.02239202) quadrant=all radius=0.01583004 length=0.07030178
      WrapCylinder AL_at_femshaft_r: xyz_body_rotation=(1.77711 0.136489 0)
          translation=(0.02945284 -0.2333692 0.01448428) quadrant=all radius=0.01929241 length=0.1003498
      WrapCylinder AMprox_at_femshaft_r: xyz_body_rotation=(1.61126 0.18656 0)
          translation=(0.004967145 -0.07335371 0.02434514) quadrant=all radius=0.02023995 length=0.07032273
      WrapCylinder AMmid_at_femshaft_r: xyz_body_rotation=(1.61139 0.13656 0)
          translation=(0.02205419 -0.1617227 0.01972703) quadrant=all radius=0.02051941 length=0.1206423
      WrapCylinder AMdist_at_femshaft_r: xyz_body_rotation=(1.71188 0.186636 0)
          translation=(0.03029025 -0.2623774 0.008974624) quadrant=all radius=0.02092081 length=0.2007576
      WrapCylinder AMisch_at_condyles_r: xyz_body_rotation=(1.71115 -0.463363 0)
          translation=(-0.02170786 -0.3792033 -0.003023013) quadrant=all radius=0.03854499 length=0.2390791
      WrapCylinder PECT_at_femshaft_r: xyz_body_rotation=(1.81295 0.276344 0)
          translation=(0.005832296 -0.08503494 0.02917284) quadrant=all radius=0.01442231 length=0.05001518
    Body tibia_r: mass=3.616113 mass_center=(0 -0.1871068 0) inertia=(0.04502205 0.003719667 0.04502205 0 0 0)
        meshes=(tibia_r.vtp fibula_r.vtp)
      WrapCylinder GasLat_at_shank_r: xyz_body_rotation=(2.96723 -0.279725 -1.47812)
          translation=(-0.006668586 -0.07416135 -0.002973829) quadrant=-y radius=0.05227388 length=0.09041213
      WrapCylinder GasMed_at_shank_r: xyz_body_rotation=(2.96723 0.0279725 -1.47812)
          translation=(-0.006668586 -0.07416135 -0.002973829) quadrant=-y radius=0.05226455 length=0.09043627
      WrapCylinder GR_at_condyles_r: xyz_body_rotation=(0 -0.4 0) translation=(-0.002703481 -0.02004361 0) quadrant=all
          radius=0.03426013 length=0.09011603
      WrapCylinder SM_at_condyles_r: xyz_body_rotation=(0 -0.1 0) translation=(-0.0009011603 -0.02004361 0)
          quadrant=all radius=0.03349879 length=0.09011603
      WrapCylinder ST_at_condyles_r: xyz_body_rotation=(0 -0.2 0) translation=(-0.001802321 -0.0205447 0) quadrant=all
          radius=0.04044599 length=0.09011603
      WrapCylinder BF_at_gastroc_r: translation=(-0.0522673 -0.06013082 0) quadrant=y radius=0.02855011 length=0.135174
    Body patella_r: mass=0.08407524 mass_center=(0.001725041 0.0253006 0)
        inertia=(2.367364e-6 1.081399e-5 1.081399e-5 0 0 0) meshes=r_patella.vtp
    Body talus_r: mass=0.09753508 mass_center=(0 0 0) inertia=(0.001930903 0.001098183 0.001930903 0 0 0)
        meshes=r_talus.vtp
    Body calcn_r: mass=1.219188 mass_center=(0.09435943 0.0498228 0)
        inertia=(0.002442062 0.003779895 0.003779895 0 0 0) meshes=r_foot.vtp
      PhysicalOffsetFrame heelr: socket_parent=.. translation=(0.1 -0.01 0) [meters]
    Body toes_r: mass=0.211261 mass_center=(0.03264825 0.00996457 -0.02046583)
        inertia=(0.0001744332 0.0002071634 0.0002071634 0 0 0) meshes=r_bofoot.vtp
      PhysicalOffsetFrame bigToeR: socket_parent=.. translation=(0.09 -0.03 0)
    Body femur_l: mass=9.072128 mass_center=(0 -0.1710703 0) inertia=(0.1202917 0.0289528 0.1202917 0 0 0)
        meshes=femur_l.vtp
      WrapCylinder Gastroc_at_condyles_l: translation=(0.00479178 -0.4125813 0) quadrant=all radius=0.02455815
          length=0.0958356
      WrapCylinder KnExt_at_fem_l: xyz_body_rotation=(0.0623366 -0.0507601 0)
          translation=(0.003438847 -0.4052672 -0.002004024) quadrant=all radius=0.02455588 length=0.09585462
      WrapCylinder AB_at_femshaft_l: xyz_body_rotation=(-1.66157 -0.186644 0)
          translation=(0.01403361 -0.1133039 -0.02239202) quadrant=all radius=0.01583004 length=0.07030178
      WrapCylinder AL_at_femshaft_l: xyz_body_rotation=(-1.77711 -0.136489 0)
          translation=(0.02945284 -0.2333692 -0.01448428) quadrant=all radius=0.01929241 length=0.1003498
      WrapCylinder AMprox_at_femshaft_l: xyz_body_rotation=(-1.61126 -0.18656 0)
          translation=(0.004967145 -0.07335371 -0.02434514) quadrant=all radius=0.02023995 length=0.07032273
      WrapCylinder AMmid_at_femshaft_l: xyz_body_rotation=(-1.61139 -0.13656 0)
          translation=(0.02205419 -0.1617227 -0.01972703) quadrant=all radius=0.02051941 length=0.1206423
      WrapCylinder AMdist_at_femshaft_l: xyz_body_rotation=(-1.71188 -0.186636 0)
          translation=(0.03029025 -0.2623774 -0.008974624) quadrant=all radius=0.02092081 length=0.2007576
      WrapCylinder AMisch_at_condyles_l: xyz_body_rotation=(-1.71115 0.463363 0)
          translation=(-0.02170786 -0.3792033 0.003023013) quadrant=all radius=0.03854499 length=0.2390791
      WrapCylinder PECT_at_femshaft_l: xyz_body_rotation=(-1.81295 -0.276344 0)
          translation=(0.005832296 -0.08503494 -0.02917284) quadrant=all radius=0.01442231 length=0.05001518
    Body tibia_l: mass=3.616113 mass_center=(0 -0.1871068 0) inertia=(0.04502205 0.003719667 0.04502205 0 0 0)
        meshes=(tibia_l.vtp fibula_l.vtp)
      WrapCylinder GasLat_at_shank_l: xyz_body_rotation=(-2.96723 0.279725 -1.47812)
          translation=(-0.006668586 -0.07416135 0.002973829) quadrant=-y radius=0.05227388 length=0.09041213
      WrapCylinder GasMed_at_shank_l: xyz_body_rotation=(-2.96723 -0.0279725 -1.47812)
          translation=(-0.006668586 -0.07416135 0.002973829) quadrant=-y radius=0.05226455 length=0.09043627
      WrapCylinder GR_at_condyles_l: xyz_body_rotation=(0 0.4 0) translation=(-0.002703481 -0.02004361 0) quadrant=all
          radius=0.03426013 length=0.09011603
      WrapCylinder SM_at_condyles_l: xyz_body_rotation=(0 0.1 0) translation=(-0.0009011603 -0.02004361 0) quadrant=all
          radius=0.03349879 length=0.09011603
      WrapCylinder ST_at_condyles_l: xyz_body_rotation=(0 0.2 0) translation=(-0.001802321 -0.0205447 0) quadrant=all
          radius=0.04044599 length=0.09011603
      WrapCylinder BF_at_gastroc_l: translation=(-0.0522673 -0.06013082 0) quadrant=y radius=0.02855011 length=0.135174
    Body patella_l: mass=0.08407524 mass_center=(0.001725041 0.0253006 0)
        inertia=(2.367364e-6 1.081399e-5 1.081399e-5 0 0 0) meshes=l_pat.vtp
    Body talus_l: mass=0.09753508 mass_center=(0 0 0) inertia=(0.001930903 0.001098183 0.001930903 0 0 0)
        meshes=l_talus.vtp
    Body calcn_l: mass=1.219188 mass_center=(0.09435943 0.0498228 0)
        inertia=(0.002442062 0.003779895 0.003779895 0 0 0) meshes=l_foot.vtp
      PhysicalOffsetFrame heell: socket_parent=.. translation=(0.1 -0.01 0)
    Body toes_l: mass=0.211261 mass_center=(0.03264825 0.00996457 -0.02046583)
        inertia=(0.0001744332 0.0002071634 0.0002071634 0 0 0) meshes=l_bofoot.vtp
      PhysicalOffsetFrame bigToeL: socket_parent=.. translation=(0.09 -0.03 0)
    Body torso: mass=26.16534 mass_center=(-0.01449925 0.3279662 -0.00230561)
        inertia=(1.524461 0.9796133 1.524461 0 0 0) meshes=(hat_spine.vtp hat_jaw.vtp hat_skull.vtp hat_ribs_scap.vtp)
      PhysicalOffsetFrame head: socket_parent=.. translation=(0 0.55 0)
      PhysicalOffsetFrame vitals: socket_parent=.. translation=(0 0.2 0)
    Body humerus_r: mass=1.9824 mass_center=(0 -0.1804462 0) inertia=(0.01401962 0.004836336 0.01573657 0 0 0)
        meshes=humerus_rv.vtp
    Body ulna_r: mass=0.5925256 mass_center=(0 -0.1222407 0) inertia=(0.002971823 0.0006200495 0.003223655 0 0 0)
        meshes=ulna_rv.vtp
    Body radius_r: mass=0.5925256 mass_center=(0 -0.1222407 0) inertia=(0.002971823 0.0006200495 0.003223655 0 0 0)
        meshes=radius_rv.vtp
    Body hand_r: mass=0.446223 mass_center=(0 -0.068095 0) inertia=(0.0008700129 0.0005335169 0.00130697 0 0 0)
        meshes=(pisiform_rvs.vtp lunate_rvs.vtp scaphoid_rvs.vtp triquetrum_rvs.vtp hamate_rvs.vtp capitate_rvs.vtp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)
    Body humerus_l: mass=1.9824 mass_center=(0 -0.1804462 0) inertia=(0.01401962 0.004836336 0.01573657 0 0 0)
        meshes=humerus_lv.vtp
    Body ulna_l: mass=0.5925256 mass_center=(0 -0.1222407 0) inertia=(0.002971823 0.0006200495 0.003223655 0 0 0)
        meshes=ulna_lv.vtp
    Body radius_l: mass=0.5925256 mass_center=(0 -0.1222407 0) inertia=(0.002971823 0.0006200495 0.003223655 0 0 0)
        meshes=radius_lv.vtp
    Body hand_l: mass=0.446223 mass_center=(0 -0.068095 0) inertia=(0.0008700129 0.0005335169 0.00130697 0 0 0)
        meshes=(pisiform_lvs.vtp lunate_lvs.vtp scaphoid_lvs.vtp triquetrum_lvs.vtp hamate_lvs.vtp capitate_lvs.vtp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)
  JointSet:
    CustomJoint groundPelvis: socket_parent_frame=ground_offset socket_child_frame=pelvis_offset
      Coordinate pelvis_tilt: default_value=0 range=(-1.570796 1.570796) clamped=true
      Coordinate pelvis_list: default_value=0 range=(-1.570796 1.570796) clamped=true
      Coordinate pelvis_rotation: default_value=0 range=(-1.570796 1.570796) clamped=true
      Coordinate pelvis_tx: default_value=0 range=(-5 5) clamped=true
      Coordinate pelvis_ty: default_value=0.93 range=(-1 2) clamped=true
      PhysicalOffsetFrame ground_offset: socket_parent=/ground translation=(0 0 0)
      PhysicalOffsetFrame pelvis_offset: socket_parent=/bodyset/pelvis translation=(0 0 0)
      SpatialTransform:
        TransformAxis rotation1: coordinates=pelvis_tilt axis=(0 0 1) LinearFunction(coefficients=1 0)
        TransformAxis rotation2: coordinates=pelvis_list axis=(1 0 0) LinearFunction(coefficients=1 0)
        TransformAxis rotation3: coordinates=pelvis_rotation axis=(0 1 0) LinearFunction(coefficients=1 0)
        TransformAxis translation1: coordinates=pelvis_tx axis=(1 0 0) LinearFunction(coefficients=1 0)
        TransformAxis translation2: coordinates=pelvis_ty axis=(0 1 0) LinearFunction(coefficients=1 0)
        TransformAxis translation3: axis=(0 0 1)
    CustomJoint back: socket_parent_frame=pelvis_offset socket_child_frame=torso_offset
      Coordinate lumbar_extension: default_value=0 range=(-1.570796 1.570796) clamped=true
      Coordinate lumbar_bending: default_value=0 range=(-1.570796 1.570796) clamped=true
      Coordinate lumbar_rotation: default_value=0 range=(-1.570796 1.570796) clamped=true
      PhysicalOffsetFrame pelvis_offset: socket_parent=/bodyset/pelvis translation=(-0.1125235 0.07591259 0)
      PhysicalOffsetFrame torso_offset: socket_parent=/bodyset/torso translation=(0 0 0)
      SpatialTransform: axes_held_at_zero=(translation1 translation2 translation3)
        TransformAxis rotation1: coordinates=lumbar_extension axis=(0 0 1) LinearFunction(coefficients=1 0)
        TransformAxis rotation2: coordinates=lumbar_bending axis=(1 0 0) LinearFunction(coefficients=1 0)
        TransformAxis rotation3: coordinates=lumbar_rotation axis=(0 1 0) LinearFunction(coefficients=1 0)
    PinJoint hip_r: socket_parent_frame=pelvis_offset socket_child_frame=femur_r_offset
      Coordinate hip_flexion_r: default_value=0 range=(-1.0467 2.094395) clamped=true
      PhysicalOffsetFrame pelvis_offset: socket_parent=/bodyset/pelvis translation=(-0.06288375 -0.07310896 0.08943481)
      PhysicalOffsetFrame femur_r_offset: socket_parent=/bodyset/femur_r translation=(0 0 0)
    CustomJoint walker_knee_r: socket_parent_frame=femur_r_offset socket_child_frame=tibia_r_offset
      Coordinate knee_angle_r: default_value=0 range=(0 2.443) clamped=true
      PhysicalOffsetFrame femur_r_offset: socket_parent=/bodyset/femur_r
          translation=(-0.0077531 -0.4105288 -0.002635479) orientation=(-1.64157 1.44618 1.5708) [radians]
      PhysicalOffsetFrame tibia_r_offset: socket_parent=/bodyset/tibia_r
          translation=(-0.007289971 -0.003542511 -0.001337992) orientation=(-1.64157 1.44618 1.5708)
      SpatialTransform: axes_held_at_zero=translation3
        TransformAxis rotation1: coordinates=knee_angle_r axis=(1 0 0) LinearFunction(coefficients=1 0)
        TransformAxis rotation2: coordinates=knee_angle_r axis=(0 0 1)
          SimmSpline: x=(0 0.174533 0.349066 0.523599 0.698132 0.872665 1.0472 1.22173 1.39626 1.5708 1.74533 1.91986 2.0944 2.27 2.443)
              y=(0 0.0126809 0.0226969 0.0296054 0.0332049 0.0335354 0.0308779 0.0257548 0.0189295 0.011407 0.00443314 -0.00050475 -0.0016782 0.0027 0.0143)
        TransformAxis rotation3: coordinates=knee_angle_r axis=(0 1 0)
          SimmSpline: x=(0 0.174533 0.349066 0.523599 0.698132 0.872665 1.0472 1.22173 1.39626 1.5708 1.74533 1.91986 2.0944 2.27 2.443)
              y=(0 0.059461 0.109399 0.150618 0.18392 0.210107 0.229983 0.24435 0.254012 0.25977 0.262428 0.262788 0.261654 0.2598 0.2581)
        TransformAxis translation1: coordinates=knee_angle_r axis=(0 1 0)
          MultiplierFunction: scale=1.006296
            SimmSpline: x=(0 0.174533 0.349066 0.523599 0.698132 0.872665 1.0472 1.22173 1.39626 1.5708 1.74533 1.91986 2.0944 2.27 2.443)
                y=(0 0.000479 0.000835 0.001086 0.001251 0.001346 0.001391 0.001403 0.0014 0.0014 0.001421 0.001481 0.001599 0.0018 0.0021)
        TransformAxis translation2: coordinates=knee_angle_r axis=(0 0 1)
          MultiplierFunction: scale=0.958356
            SimmSpline: x=(0 0.174533 0.349066 0.523599 0.698132 0.872665 1.0472 1.22173 1.39626 1.5708 1.74533 1.91986 2.0944 2.27 2.443)
                y=(0 0.000988 0.001899 0.002734 0.003492 0.004173 0.004777 0.005305 0.005756 0.00613 0.006427 0.006648 0.006792 0.0069 0.0068)
    CustomJoint patellofemoral_r: socket_parent_frame=femur_r_offset socket_child_frame=patella_r_offset
      Coordinate knee_angle_r_beta: default_value=0 range=(-99999.9 99999.9) clamped=false
      PhysicalOffsetFrame femur_r_offset: socket_parent=/bodyset/femur_r
          translation=(-0.0077531 -0.4105288 -0.002635479)
      PhysicalOffsetFrame patella_r_offset: socket_parent=/bodyset/patella_r translation=(0 0 0)
      SpatialTransform: axes_held_at_zero=(rotation2 rotation3)
        TransformAxis rotation1: coordinates=knee_angle_r_beta axis=(0 0 1)
          SimmSpline: x=(0 0.174533 0.349066 0.523599 0.698132 0.872665 1.0472 1.22173 1.39626 1.5708 1.74533 1.91986 2.0944 2.27 2.443)
              y=(0.00113686 -0.00629212 -0.105582 -0.253683 -0.414245 -0.579047 -0.747244 -0.91799 -1.09044 -1.26379 -1.43763 -1.61186 -1.78634 -1.9619 -2.1348)
        TransformAxis translation1: coordinates=knee_angle_r_beta axis=(1 0 0)
          MultiplierFunction: scale=0.958356
            SimmSpline f9: x=(0 0.174533 0.349066 0.523599 0.698132 0.872665 1.0472 1.22173 1.39626 1.5708 1.74533 1.91986 2.0944 2.27 2.443)
                y=(0.0524 0.0488 0.0437 0.0371 0.0296 0.0216 0.0136 0.0057 -0.0019 -0.0088 -0.0148 -0.0196 -0.0227 -0.0236 -0.0216)
        TransformAxis translation2: coordinates=knee_angle_r_beta axis=(0 1 0)
          MultiplierFunction: scale=1.006296
            SimmSpline f10: x=(0 0.174533 0.349066 0.523599 0.698132 0.872665 1.0472 1.22173 1.39626 1.5708 1.74533 1.91986 2.0944 2.27 2.443)
                y=(-0.0108 -0.019 -0.0263 -0.0322 -0.0367 -0.0395 -0.0408 -0.0404 -0.0384 -0.0349 -0.0301 -0.0245 -0.0187 -0.0133 -0.0089)
        TransformAxis translation3: axis=(0 0 1) MultiplierFunction(scale=0.958356, Constant(value=0.00275))
    PinJoint ankle_r: socket_parent_frame=tibia_r_offset socket_child_frame=talus_r_offset
      Coordinate ankle_angle_r: default_value=0 range=(-0.6981317 0.5235988) clamped=true
      PhysicalOffsetFrame tibia_r_offset: socket_parent=/bodyset/tibia_r translation=(-0.009011603 -0.4008721 0)
          orientation=(0.175895 -0.105208 0.0186622)
      PhysicalOffsetFrame talus_r_offset: socket_parent=/bodyset/talus_r translation=(0 0 0)
          orientation=(0.175895 -0.105208 0.0186622)
    WeldJoint subtalar_r: socket_parent_frame=talus_r_offset socket_child_frame=calcn_r_offset
      PhysicalOffsetFrame talus_r_offset: socket_parent=/bodyset/talus_r
          translation=(-0.04601892 -0.0696689 0.009262248) orientation=(-1.76819 0.906223 1.8196)
      PhysicalOffsetFrame calcn_r_offset: socket_parent=/bodyset/calcn_r translation=(0 0 0)
          orientation=(-1.76819 0.906223 1.8196)
    PinJoint mtp_r: socket_parent_frame=calcn_r_offset socket_child_frame=toes_r_offset
      Coordinate mtp_angle_r: default_value=0 range=(-1.0467 0.5235988) clamped=true
      PhysicalOffsetFrame calcn_r_offset: socket_parent=/bodyset/calcn_r
          translation=(0.1687138 -0.00332152 0.001263036) orientation=(-3.14159 0.619901 0)
      PhysicalOffsetFrame toes_r_offset: socket_parent=/bodyset/toes_r translation=(0 0 0)
          orientation=(-3.14159 0.619901 0)
    PinJoint hip_l: socket_parent_frame=pelvis_offset socket_child_frame=femur_l_offset
      Coordinate hip_flexion_l: default_value=0 range=(-1.0467 2.094395) clamped=true
      PhysicalOffsetFrame pelvis_offset: socket_parent=/bodyset/pelvis
          translation=(-0.06288375 -0.07310896 -0.08943481)
      PhysicalOffsetFrame femur_l_offset: socket_parent=/bodyset/femur_l translation=(0 0 0)
    CustomJoint walker_knee_l: socket_parent_frame=femur_l_offset socket_child_frame=tibia_l_offset
      Coordinate knee_angle_l: default_value=0 range=(0 2.443) clamped=true
      PhysicalOffsetFrame femur_l_offset: socket_parent=/bodyset/femur_l
          translation=(-0.0077531 -0.4105288 0.002635479) orientation=(1.64157 -1.44618 1.5708)
      PhysicalOffsetFrame tibia_l_offset: socket_parent=/bodyset/tibia_l
          translation=(-0.007289971 -0.003542511 0.001337992) orientation=(1.64157 -1.44618 1.5708)
      SpatialTransform: axes_held_at_zero=translation3
        TransformAxis rotation1: coordinates=knee_angle_l axis=(-1 0 0) LinearFunction(coefficients=1 0)
        TransformAxis rotation2: coordinates=knee_angle_l axis=(0 0 1)
          SimmSpline: x=(0 0.174533 0.349066 0.523599 0.698132 0.872665 1.0472 1.22173 1.39626 1.5708 1.74533 1.91986 2.0944 2.27 2.443)
              y=(0 0.0126809 0.0226969 0.0296054 0.0332049 0.0335354 0.0308779 0.0257548 0.0189295 0.011407 0.00443314 -0.00050475 -0.0016782 0.0027 0.0143)
        TransformAxis rotation3: coordinates=knee_angle_l axis=(0 1 0)
          SimmSpline: x=(0 0.174533 0.349066 0.523599 0.698132 0.872665 1.0472 1.22173 1.39626 1.5708 1.74533 1.91986 2.0944 2.27 2.443)
              y=(0 -0.059461 -0.109399 -0.150618 -0.18392 -0.210107 -0.229983 -0.24435 -0.254012 -0.25977 -0.262428 -0.262788 -0.261654 -0.2598 -0.2581)
        TransformAxis translation1: coordinates=knee_angle_l axis=(0 1 0)
          MultiplierFunction: scale=1.006296
            SimmSpline: x=(0 0.174533 0.349066 0.523599 0.698132 0.872665 1.0472 1.22173 1.39626 1.5708 1.74533 1.91986 2.0944 2.27 2.443)
                y=(0 0.000479 0.000835 0.001086 0.001251 0.001346 0.001391 0.001403 0.0014 0.0014 0.001421 0.001481 0.001599 0.0018 0.0021)
        TransformAxis translation2: coordinates=knee_angle_l axis=(0 0 1)
          MultiplierFunction: scale=0.958356
            SimmSpline: x=(0 0.174533 0.349066 0.523599 0.698132 0.872665 1.0472 1.22173 1.39626 1.5708 1.74533 1.91986 2.0944 2.27 2.443)
                y=(0 -0.000988 -0.001899 -0.002734 -0.003492 -0.004173 -0.004777 -0.005305 -0.005756 -0.00613 -0.006427 -0.006648 -0.006792 -0.0069 -0.0068)
    CustomJoint patellofemoral_l: socket_parent_frame=femur_l_offset socket_child_frame=patella_l_offset
      Coordinate knee_angle_l_beta: default_value=0 range=(-99999.9 99999.9) clamped=false
      PhysicalOffsetFrame femur_l_offset: socket_parent=/bodyset/femur_l
          translation=(-0.0077531 -0.4105288 0.002635479)
      PhysicalOffsetFrame patella_l_offset: socket_parent=/bodyset/patella_l translation=(0 0 0)
      SpatialTransform: axes_held_at_zero=(rotation2 rotation3)
        TransformAxis rotation1: coordinates=knee_angle_l_beta axis=(0 0 1)
          SimmSpline: x=(0 0.174533 0.349066 0.523599 0.698132 0.872665 1.0472 1.22173 1.39626 1.5708 1.74533 1.91986 2.0944 2.27 2.443)
              y=(0.00113686 -0.00629212 -0.105582 -0.253683 -0.414245 -0.579047 -0.747244 -0.91799 -1.09044 -1.26379 -1.43763 -1.61186 -1.78634 -1.9619 -2.1348)
        TransformAxis translation1: coordinates=knee_angle_l_beta axis=(1 0 0)
          MultiplierFunction: scale=0.958356
            SimmSpline f23: x=(0 0.174533 0.349066 0.523599 0.698132 0.872665 1.0472 1.22173 1.39626 1.5708 1.74533 1.91986 2.0944 2.27 2.443)
                y=(0.0524 0.0488 0.0437 0.0371 0.0296 0.0216 0.0136 0.0057 -0.0019 -0.0088 -0.0148 -0.0196 -0.0227 -0.0236 -0.0216)
        TransformAxis translation2: coordinates=knee_angle_l_beta axis=(0 1 0)
          MultiplierFunction: scale=1.006296
            SimmSpline f24: x=(0 0.174533 0.349066 0.523599 0.698132 0.872665 1.0472 1.22173 1.39626 1.5708 1.74533 1.91986 2.0944 2.27 2.443)
                y=(-0.0108 -0.019 -0.0263 -0.0322 -0.0367 -0.0395 -0.0408 -0.0404 -0.0384 -0.0349 -0.0301 -0.0245 -0.0187 -0.0133 -0.0089)
        TransformAxis translation3: axis=(0 0 1) MultiplierFunction(scale=0.958356, Constant(value=-0.00275))
    PinJoint ankle_l: socket_parent_frame=tibia_l_offset socket_child_frame=talus_l_offset
      Coordinate ankle_angle_l: default_value=0 range=(-0.6981317 0.5235988) clamped=true
      PhysicalOffsetFrame tibia_l_offset: socket_parent=/bodyset/tibia_l translation=(-0.009011603 -0.4008721 0)
          orientation=(-0.175895 0.105208 0.0186622)
      PhysicalOffsetFrame talus_l_offset: socket_parent=/bodyset/talus_l translation=(0 0 0)
          orientation=(-0.175895 0.105208 0.0186622)
    WeldJoint subtalar_l: socket_parent_frame=talus_l_offset socket_child_frame=calcn_l_offset
      PhysicalOffsetFrame talus_l_offset: socket_parent=/bodyset/talus_l
          translation=(-0.04601892 -0.0696689 -0.009262248) orientation=(1.76819 -0.906223 1.8196)
      PhysicalOffsetFrame calcn_l_offset: socket_parent=/bodyset/calcn_l translation=(0 0 0)
          orientation=(1.76819 -0.906223 1.8196)
    PinJoint mtp_l: socket_parent_frame=calcn_l_offset socket_child_frame=toes_l_offset
      Coordinate mtp_angle_l: default_value=0 range=(-1.0467 0.5235988) clamped=true
      PhysicalOffsetFrame calcn_l_offset: socket_parent=/bodyset/calcn_l
          translation=(0.1687138 -0.00332152 -0.001263036) orientation=(-3.14159 -0.619901 0)
      PhysicalOffsetFrame toes_l_offset: socket_parent=/bodyset/toes_l translation=(0 0 0)
          orientation=(-3.14159 -0.619901 0)
    PinJoint acromial_r: socket_parent_frame=torso_offset socket_child_frame=humerus_r_offset
      Coordinate arm_flex_r: default_value=0 range=(-1.570796 1.570796) clamped=true
      PhysicalOffsetFrame torso_offset: socket_parent=/bodyset/torso translation=(0.003747804 0.3784267 0.2171463)
      PhysicalOffsetFrame humerus_r_offset: socket_parent=/bodyset/humerus_r translation=(0 0 0)
    PinJoint elbow_r: socket_parent_frame=humerus_r_offset socket_child_frame=ulna_r_offset
      Coordinate elbow_flex_r: default_value=0 range=(0 2.791) clamped=true
      PhysicalOffsetFrame humerus_r_offset: socket_parent=/bodyset/humerus_r
          translation=(0.01441797 -0.3140197 -0.01052498) orientation=(-0.0228627 0.228018 0.0051689)
      PhysicalOffsetFrame ulna_r_offset: socket_parent=/bodyset/ulna_r translation=(0 0 0)
          orientation=(-0.0228627 0.228018 0.0051689)
    WeldJoint radioulnar_r: socket_parent_frame=ulna_r_offset socket_child_frame=radius_r_offset
      PhysicalOffsetFrame ulna_r_offset: socket_parent=/bodyset/ulna_r
          translation=(-0.006609996 -0.01278077 0.02562933)
      PhysicalOffsetFrame radius_r_offset: socket_parent=/bodyset/radius_r translation=(0 0 0)
          orientation=(0 -1.48353 0)
    WeldJoint radius_hand_r: socket_parent_frame=radius_r_offset socket_child_frame=hand_r_offset
      PhysicalOffsetFrame radius_r_offset: socket_parent=/bodyset/radius_r
          translation=(-0.008643993 -0.231739 0.01337328)
      PhysicalOffsetFrame hand_r_offset: socket_parent=/bodyset/hand_r translation=(0 0 0)
    PinJoint acromial_l: socket_parent_frame=torso_offset socket_child_frame=humerus_l_offset
      Coordinate arm_flex_l: default_value=0 range=(-1.570796 1.570796) clamped=true
      PhysicalOffsetFrame torso_offset: socket_parent=/bodyset/torso translation=(0.003747804 0.3784267 -0.2171463)
      PhysicalOffsetFrame humerus_l_offset: socket_parent=/bodyset/humerus_l translation=(0 0 0)
    PinJoint elbow_l: socket_parent_frame=humerus_l_offset socket_child_frame=ulna_l_offset
      Coordinate elbow_flex_l: default_value=0 range=(0 2.791) clamped=true
      PhysicalOffsetFrame humerus_l_offset: socket_parent=/bodyset/humerus_l
          translation=(0.01441797 -0.3140197 0.01052498) orientation=(0.0228627 -0.228018 0.0051689)
      PhysicalOffsetFrame ulna_l_offset: socket_parent=/bodyset/ulna_l translation=(0 0 0)
          orientation=(0.0228627 -0.228018 0.0051689)
    WeldJoint radioulnar_l: socket_parent_frame=ulna_l_offset socket_child_frame=radius_l_offset
      PhysicalOffsetFrame ulna_l_offset: socket_parent=/bodyset/ulna_l
          translation=(-0.006609996 -0.01278077 -0.02562933)
      PhysicalOffsetFrame radius_l_offset: socket_parent=/bodyset/radius_l translation=(0 0 0)
          orientation=(0 1.48353 0)
    WeldJoint radius_hand_l: socket_parent_frame=radius_l_offset socket_child_frame=hand_l_offset
      PhysicalOffsetFrame radius_l_offset: socket_parent=/bodyset/radius_l
          translation=(-0.008643993 -0.231739 -0.01337328)
      PhysicalOffsetFrame hand_l_offset: socket_parent=/bodyset/hand_l translation=(0 0 0)
  ConstraintSet:
    CoordinateCouplerConstraint patellofemoral_knee_angle_r_con: independent_coordinate_names=knee_angle_r
        dependent_coordinate_name=knee_angle_r_beta scale_factor=1
        coupled_coordinates_function=LinearFunction(coefficients=1 0)
    CoordinateCouplerConstraint patellofemoral_knee_angle_l_con: independent_coordinate_names=knee_angle_l
        dependent_coordinate_name=knee_angle_l_beta scale_factor=1
        coupled_coordinates_function=LinearFunction(coefficients=1 0)
  ForceSet:
    PathSpring HOBL: resting_length=0.4305 [m] stiffness=240 [N/m] dissipation=0 [s/m]
      PathPoint L: calcn_l (0.1443374 0.05101509 0.04364635)
      PathPoint R: calcn_r (0.1356565 0.04938797 -0.04511311)
    ExpressionBasedCoordinateForce PassiveLumbarExtensionDamping_r: coordinate=lumbar_extension
        expression=-0.35*exp(30.72*(q-0.25))+0.25*exp(-20.36*(q+0.35))-0.0001*qdot
    ExpressionBasedCoordinateForce PassiveLumbarRotationDamping_r: coordinate=lumbar_rotation
        expression=-0.25*exp(20.36*(q-0.17))+0.25*exp(-20.36*(q+0.17))-0.0001*qdot
    ExpressionBasedCoordinateForce PassiveLumbarBendingDamping_r: coordinate=lumbar_bending
        expression=-0.25*exp(20.36*(q-0.17))+0.25*exp(-20.36*(q+0.17))-0.0001*qdot
    ExpressionBasedCoordinateForce PassiveToeDamping_r: coordinate=mtp_angle_r expression=-0.4*qdot
    ExpressionBasedCoordinateForce PassiveToeDamping_l: coordinate=mtp_angle_l expression=-0.4*qdot
    SpringGeneralizedForce mtp_spring_r: coordinate=mtp_angle_r stiffness=65 rest_length=-0.2616667 viscosity=0
    SpringGeneralizedForce mtp_spring_l: coordinate=mtp_angle_l stiffness=65 rest_length=-0.2616667 viscosity=0
    DeGrooteFregly2016Muscle [values shared by the 18 below unless stated]: min_control=0.01 max_control=1
        max_contraction_velocity=10 activation_time_constant=0.01 deactivation_time_constant=0.04
        default_activation=0.01 fiber_damping=0.01 passive_fiber_strain_at_one_norm_force=0.7
        tendon_strain_at_one_norm_force=0.049
    DeGrooteFregly2016Muscle bfsh_r: max_isometric_force=890.9281 optimal_fiber_length=0.1107026
        tendon_slack_length=0.1062034 pennation_angle_at_optimal=0.2642232 [radians]
      PathPoint P1: femur_r (0.00479178 -0.212429 0.02242553)
      PathPoint P2: tibia_r (-0.02712492 -0.04199136 0.0286569)
      PathWrap: wrap_object=BF_at_gastroc_r method=hybrid
    DeGrooteFregly2016Muscle gasmed_r: max_isometric_force=8650.021 optimal_fiber_length=0.06168364
        tendon_slack_length=0.398061 pennation_angle_at_optimal=0.1656816 tendon_strain_at_one_norm_force=0.1
      PathPoint P1: femur_r (0.007666848 -0.3811848 -0.0199338)
      PathPoint P2: calcn_r (0.004149905 0.05140473 -0.00619133)
      PathWrap: wrap_object=GasMed_at_shank_r method=hybrid
      PathWrap pathwrap_0: wrap_object=Gastroc_at_condyles_r method=hybrid
    DeGrooteFregly2016Muscle glmax2_r: max_isometric_force=5576.107 optimal_fiber_length=0.1841624
        tendon_slack_length=0.05938978 pennation_angle_at_optimal=0.3673821
      PathPoint P1: pelvis (-0.1469422 0.008098574 0.05351118)
      PathPoint P2: pelvis (-0.1499547 -0.05669002 0.09416577)
      PathPoint P3: femur_r (-0.04312602 -0.05876767 0.02415057)
      PathPoint P4: femur_r (-0.01495035 -0.1022397 0.04015512)
      PathWrap: wrap_object=Gmax2_at_pelvis_r method=hybrid
    DeGrooteFregly2016Muscle psoas_r: max_isometric_force=5394.689 optimal_fiber_length=0.1217816
        tendon_slack_length=0.0931985 pennation_angle_at_optimal=0.279914
      PathPoint P1: pelvis (-0.0581016 0.02873367 0.08149957)
      PathPoint P2: pelvis (-0.01296482 -0.05179499 0.07308858)
      PathPoint P3: femur_r (-0.002401339 -0.07078205 0.01451244)
      PathPoint P4: femur_r (-0.01273754 -0.06582214 0.02046359)
      PathWrap: wrap_object=IL_at_brim_r method=hybrid range=(2 3)
    DeGrooteFregly2016Muscle recfem_r: max_isometric_force=3469.86 optimal_fiber_length=0.08893699
        tendon_slack_length=0.4687121 pennation_angle_at_optimal=0.2170149
      PathPoint P1: pelvis (-0.02677762 -0.03611778 0.1080648)
      PathPoint P2: patella_r (0.00958356 0.04695944 0.0006708492)
      PathPoint P3: patella_r (0.01159611 0.04188016 -0.000958356)
      PathPoint P4: patella_r (0.00479178 0.002367139 2.875068e-5)
      PathPoint P5: tibia_r (0.02937783 -0.06325762 -0.0004235453)
      PathWrap: wrap_object=KnExt_at_fem_r method=hybrid
    DeGrooteFregly2016Muscle semimem_r: max_isometric_force=6372.586 optimal_fiber_length=0.08795175
        tendon_slack_length=0.3213804 pennation_angle_at_optimal=0.2545615
      PathPoint P1: pelvis (-0.110123 -0.1061192 0.07111659)
      PathPoint P2: tibia_r (-0.02613365 -0.04179092 -0.01766274)
      PathWrap: wrap_object=SM_at_condyles_r method=hybrid
    DeGrooteFregly2016Muscle soleus_r: max_isometric_force=14711.42 optimal_fiber_length=0.05500896
        tendon_slack_length=0.2806021 pennation_angle_at_optimal=0.3814289 tendon_strain_at_one_norm_force=0.1
      PathPoint P1: tibia_r (-0.006848818 -0.09179972 0.008831371)
      PathPoint P2: calcn_r (0.004149905 0.05140473 -0.00619133)
    DeGrooteFregly2016Muscle tibant_r: max_isometric_force=3902.93 optimal_fiber_length=0.07154496
        tendon_slack_length=0.2518854 pennation_angle_at_optimal=0.1951828
      PathPoint P1: tibia_r (0.01387787 -0.1314861 0.0145988)
      PathPoint P2: tibia_r (0.02261912 -0.1910156 0.01153485)
      PathPoint P3: tibia_r (0.02099703 -0.3666978 -0.01189532)
      PathPoint P4: calcn_r (0.1099725 0.02951626 -0.03562935)
    DeGrooteFregly2016Muscle vasint_r: max_isometric_force=15296.85 optimal_fiber_length=0.1198668
        tendon_slack_length=0.2333648 pennation_angle_at_optimal=0.06309973
      PathPoint P1: femur_r (0.02779232 -0.1936113 0.02970904)
      PathPoint P2: femur_r (0.03210492 -0.209712 0.02731315)
      PathPoint P3: patella_r (0.005558465 0.04600109 -0.0005750136)
      PathPoint P4: patella_r (0.00479178 0.002367139 -0.0003737588)
      PathPoint P5: tibia_r (0.02935079 -0.0633378 0.0003874989)
      PathWrap: wrap_object=KnExt_at_fem_r method=hybrid
    DeGrooteFregly2016Muscle bfsh_l: max_isometric_force=890.9281 optimal_fiber_length=0.1107026
        tendon_slack_length=0.1062034 pennation_angle_at_optimal=0.2642232
      PathPoint P1: femur_l (0.00479178 -0.212429 -0.02242553)
      PathPoint P2: tibia_l (-0.02712492 -0.04199136 -0.0286569)
      PathWrap: wrap_object=BF_at_gastroc_l method=hybrid
    DeGrooteFregly2016Muscle gasmed_l: max_isometric_force=8650.021 optimal_fiber_length=0.06168364
        tendon_slack_length=0.398061 pennation_angle_at_optimal=0.1656816 tendon_strain_at_one_norm_force=0.1
      PathPoint P1: femur_l (0.007666848 -0.3811848 0.0199338)
      PathPoint P2: calcn_l (0.004149905 0.05140473 0.00619133)
      PathWrap: wrap_object=GasMed_at_shank_l method=hybrid
      PathWrap pathwrap_0: wrap_object=Gastroc_at_condyles_l method=hybrid
    DeGrooteFregly2016Muscle glmax2_l: max_isometric_force=5576.107 optimal_fiber_length=0.1841624
        tendon_slack_length=0.05938978 pennation_angle_at_optimal=0.3673821
      PathPoint P1: pelvis (-0.1469422 0.008098574 -0.05351118)
      PathPoint P2: pelvis (-0.1499547 -0.05669002 -0.09416577)
      PathPoint P3: femur_l (-0.04312602 -0.05876767 -0.02415057)
      PathPoint P4: femur_l (-0.01495035 -0.1022397 -0.04015512)
      PathWrap: wrap_object=Gmax2_at_pelvis_l method=hybrid
    DeGrooteFregly2016Muscle psoas_l: max_isometric_force=5394.689 optimal_fiber_length=0.1217816
        tendon_slack_length=0.0931985 pennation_angle_at_optimal=0.279914
      PathPoint P1: pelvis (-0.0581016 0.02873367 -0.08149957)
      PathPoint P2: pelvis (-0.01296482 -0.05179499 -0.07308858)
      PathPoint P3: femur_l (-0.002401339 -0.07078205 -0.01451244)
      PathPoint P4: femur_l (-0.01273754 -0.06582214 -0.02046359)
      PathWrap: wrap_object=IL_at_brim_l method=hybrid range=(2 3)
    DeGrooteFregly2016Muscle recfem_l: max_isometric_force=3469.86 optimal_fiber_length=0.08893699
        tendon_slack_length=0.4687121 pennation_angle_at_optimal=0.2170149
      PathPoint P1: pelvis (-0.02677762 -0.03611778 -0.1080648)
      PathPoint P2: patella_l (0.00958356 0.04695944 -0.0006708492)
      PathPoint P3: patella_l (0.01159611 0.04188016 0.000958356)
      PathPoint P4: patella_l (0.00479178 0.002367139 -2.875068e-5)
      PathPoint P5: tibia_l (0.02937783 -0.06325762 0.0004235453)
      PathWrap: wrap_object=KnExt_at_fem_l method=hybrid
    DeGrooteFregly2016Muscle semimem_l: max_isometric_force=6372.586 optimal_fiber_length=0.08795175
        tendon_slack_length=0.3213804 pennation_angle_at_optimal=0.2545615
      PathPoint P1: pelvis (-0.110123 -0.1061192 -0.07111659)
      PathPoint P2: tibia_l (-0.02613365 -0.04179092 0.01766274)
      PathWrap: wrap_object=SM_at_condyles_l method=hybrid
    DeGrooteFregly2016Muscle soleus_l: max_isometric_force=14711.42 optimal_fiber_length=0.05500896
        tendon_slack_length=0.2806021 pennation_angle_at_optimal=0.3814289 tendon_strain_at_one_norm_force=0.1
      PathPoint P1: tibia_l (-0.006848818 -0.09179972 -0.008831371)
      PathPoint P2: calcn_l (0.004149905 0.05140473 0.00619133)
    DeGrooteFregly2016Muscle tibant_l: max_isometric_force=3902.93 optimal_fiber_length=0.07154496
        tendon_slack_length=0.2518854 pennation_angle_at_optimal=0.1951828
      PathPoint P1: tibia_l (0.01387787 -0.1314861 -0.0145988)
      PathPoint P2: tibia_l (0.02261912 -0.1910156 -0.01153485)
      PathPoint P3: tibia_l (0.02099703 -0.3666978 0.01189532)
      PathPoint P4: calcn_l (0.1099725 0.02951626 0.03562935)
    DeGrooteFregly2016Muscle vasint_l: max_isometric_force=15296.85 optimal_fiber_length=0.1198668
        tendon_slack_length=0.2333648 pennation_angle_at_optimal=0.06309973
      PathPoint P1: femur_l (0.02779232 -0.1936113 -0.02970904)
      PathPoint P2: femur_l (0.03210492 -0.209712 -0.02731315)
      PathPoint P3: patella_l (0.005558465 0.04600109 0.0005750136)
      PathPoint P4: patella_l (0.00479178 0.002367139 0.0003737588)
      PathPoint P5: tibia_l (0.02935079 -0.0633378 -0.0003874989)
      PathWrap: wrap_object=KnExt_at_fem_l method=hybrid
  MarkerSet:
    Marker C7: torso (-0.09503148 0.427831 0.003831993) fixed=true
    Marker R_Shoulder: torso (0 0.4257937 0.181381) fixed=true
    Marker L_Shoulder: torso (0 0.4257937 -0.181381) fixed=true
    Marker Sternum: torso (0.0546431 0.3921784 0) fixed=true
    Marker r.ASIS: pelvis (0.0139608 0.009582591 0.1439959) fixed=true
    Marker L.ASIS: pelvis (0.0139608 0.009582591 -0.1439959) fixed=true
    Marker r.PSIS: pelvis (-0.1653818 0.02395648 0.05624839) fixed=true
    Marker L.PSIS: pelvis (-0.1653818 0.02395648 -0.05624839) fixed=true
    Marker R_HJC: femur_r (0 0 0) fixed=true
    Marker L_HJC: femur_l (0 0 0) fixed=true
    Marker r_thigh1: femur_r (0.072926 -0.1317208 0.06747061)
    Marker r_thigh2: femur_r (0.0759503 -0.2417204 0.06574476)
    Marker r_thigh3: femur_r (0.02643243 -0.2770397 0.08616227)
    Marker r_thigh4: femur_r (-0.03889762 -0.1365883 0.07426615)
    Marker r_thigh5: femur_r (-0.03363842 -0.2529385 0.06996773)
    Marker r_knee: femur_r (0 -0.4102782 0.05946513) fixed=true
    Marker r_mknee: femur_r (0.005405921 -0.4072315 -0.05946513) fixed=true
    Marker r_shank_antsup: tibia_r (0.02951091 -0.08671457 0.04607589)
    Marker r_sh2: tibia_r (0.02821787 -0.1992448 0.06002973)
    Marker r_sh3: tibia_r (-0.03927636 -0.08210898 0.08133478)
    Marker r_sh4: tibia_r (-0.05170255 -0.1983582 0.08522088)
    Marker r_ankle: tibia_r (-0.01984377 -0.3947579 0.05258599) fixed=true
    Marker r_mankle: tibia_r (0.005953131 -0.3896312 -0.03770317) fixed=true
    Marker r_toe: calcn_r (0.1854203 0.018 0.004985299) fixed=true
    Marker r_5meta: calcn_r (0.1366255 0.005 0.06480888) fixed=true
    Marker r_calc: calcn_r (-0.02927688 0.012 -0.009970597) fixed=true
    Marker L_thigh1: femur_l (0.08144773 -0.1986506 -0.05964044)
    Marker L_thigh2: femur_l (0.06713639 -0.3384329 -0.03581903)
    Marker L_thigh3: femur_l (-0.0275076 -0.1915843 -0.0837779)
    Marker L_thigh4: femur_l (-0.04724258 -0.327802 -0.06201218)
    Marker L_knee: femur_l (0 -0.4102782 -0.05946513) fixed=true
    Marker L_mknee: femur_l (0.005405921 -0.4072315 0.05946513) fixed=true
    Marker L_ankle: tibia_l (-0.01984377 -0.3947579 -0.05258599) fixed=true
    Marker L_shank_antsup: tibia_l (0.03068997 -0.07813094 -0.04228098)
    Marker L_sh2: tibia_l (-0.04872895 -0.07334632 -0.08352855)
    Marker L_sh3: tibia_l (-0.04127859 -0.1959073 -0.09006912)
    Marker L_mankle: tibia_l (0.005953131 -0.3896312 0.03770317) fixed=true
    Marker L_toe: calcn_l (0.1854203 0.018 -0.004985299) fixed=true
    Marker L_calc: calcn_l (-0.02927688 0.012 0.009970597) fixed=true
    Marker L_5meta: calcn_l (0.1366255 0.005 -0.06480888) fixed=true
    Marker midASIS: pelvis (0.0139608 0.009582591 0) fixed=true
    Marker R_5meta_proj: calcn_r (0.1557778 -0.05832951 0.07361648)
    Marker L_5meta_proj: calcn_l (0.1557778 -0.05832951 -0.07361648)
    Marker R_toe_proj: calcn_r (0.1960825 -0.05987101 0.01109965)
    Marker L_toe_proj: calcn_l (0.1960825 -0.05987101 -0.01109965)
    Marker L_AJC: talus_l (0 0 0) fixed=true
    Marker L_AJC_proj: talus_l (0.008646064 -0.1131931 0.007468002)
    Marker L_KJC: femur_l (0.00270296 -0.4087548 0) fixed=true
    Marker R_AJC: talus_r (0 0 0) fixed=true
    Marker R_AJC_proj: talus_r (0.008646064 -0.1131931 -0.007468002)
    Marker R_KJC: femur_r (0.00270296 -0.4087548 0) fixed=true
    Marker midHJC: pelvis (-0.06043523 -0.07521375 0) fixed=true
    Marker midPelvis: pelvis (-0.07571049 0.01676953 0) fixed=true
    Marker midPSIS: pelvis (-0.1653818 0.02395648 0) fixed=true
    Marker r_band: calcn_r (0.1356565 0.04938797 -0.04511311)
    Marker L_band: calcn_l (0.1356565 0.04938797 0.04511311)
    Marker R_elbow_med: humerus_r (0.005388672 -0.3093369 -0.04546091) fixed=true
    Marker R_elbow_lat: humerus_r (0.011675 -0.3078319 0.03693112) fixed=true
    Marker L_elbow_med: humerus_l (0.005388672 -0.3093369 0.04546091) fixed=true
    Marker L_elbow_lat: humerus_l (0.011675 -0.3078319 -0.03693112) fixed=true
    Marker L_wrist_radius: radius_l (-0.02286217 -0.2313105 -0.03618364) fixed=true
    Marker L_wrist_ulna: ulna_l (-0.03715446 -0.245602 -0.02937092) fixed=true
    Marker R_wrist_radius: radius_r (-0.02286217 -0.2313105 0.03618364) fixed=true
    Marker R_wrist_ulna: ulna_r (-0.03715446 -0.245602 0.02937092) fixed=true
    Marker R_forearm: radius_r (-0.03689733 -0.1500684 0.02508475)
    Marker L_forearm: radius_l (-0.03689733 -0.1500684 -0.02508475)
    Marker R_humerus: humerus_r (0.02953507 -0.1878834 -0.009848166)
    Marker L_humerus: humerus_l (0.02953507 -0.1878834 -0.009848166)
    Marker RACR: torso (-0.03169093 0.4199807 0.1564085)
    Marker LACR: torso (-0.03169093 0.4199807 -0.1564085)
    Marker CLAV: torso (0.07151578 0.3747436 0.02212404)
    Marker RASH: torso (0.04203576 0.3902832 0.145968)
    Marker RPSH: torso (-0.07628955 0.3812327 0.150591)
    Marker LASH: torso (0.04203576 0.3902832 -0.145968)
    Marker LPSH: torso (-0.07628955 0.3812327 -0.150591)
    Marker RUA1: humerus_r (-0.01735273 -0.04577421 0.05130249)
    Marker RUA2: humerus_r (0.03617682 -0.1043812 0.01370967)
    Marker RUA3: humerus_r (-0.03406762 -0.1511847 0.0235238)
    Marker RLEL: humerus_r (0.01269862 -0.2593127 0.02961726)
    Marker RMEL: humerus_r (-0.00320862 -0.2548316 -0.03213622)
    Marker RFAsuperior: ulna_r (0.04606906 -0.07856908 0.04565544)
    Marker RFAradius: radius_r (-0.00237808 -0.2513619 0.04813755)
    Marker RFAulna: radius_r (-0.02240132 -0.2392286 -0.01612622)
    Marker LUA1: humerus_l (-0.01735273 -0.04577421 -0.05130249)
    Marker LUA2: humerus_l (-0.03617682 -0.1043812 -0.01370967)
    Marker LUA3: humerus_l (0.03406762 -0.1511847 -0.0235238)
    Marker LLEL: humerus_l (0.01269862 -0.2593127 -0.02961726)
    Marker LMEL: humerus_l (-0.00320862 -0.2548316 0.03213622)
    Marker LFAsuperior: ulna_l (0.04606906 -0.07856908 -0.04565544)
    Marker LFAradius: radius_l (-0.00237808 -0.2513619 -0.04813755)
    Marker LFAulna: radius_l (-0.02240132 -0.2392286 0.01612622)
    Marker RASI: pelvis (0.00185028 0.00184558 0.1225333)
    Marker LASI: pelvis (0.00185028 0.00184558 -0.1225333)
    Marker RPSI: pelvis (-0.165739 0.02683781 0.04575089)
    Marker LPSI: pelvis (-0.165739 0.02683781 -0.04575089)
    Marker LHJC: femur_l (0.0028005 -0.00194253 7.874e-5)
    Marker RHJC: femur_r (0.0028005 0.00194253 7.874e-5)
    Marker RTH1: femur_r (-0.00842073 -0.1048235 0.09691367)
    Marker RTH2: femur_r (0.04996138 -0.2449768 0.07968165)
    Marker RTH3: femur_r (-0.01767888 -0.3363423 0.06354245)
    Marker RLFC: femur_r (0.00482404 -0.4392505 0.06778954)
    Marker RMFC: femur_r (0.00351226 -0.4435094 -0.06026798)
    Marker RTB1: tibia_r (0.05205197 -0.1401611 0.02161089)
    Marker RTB2: tibia_r (-0.00421486 -0.1977923 0.07891106)
    Marker RTB3: tibia_r (0.04103497 -0.3198866 0.022292)
    Marker RLMAL: tibia_r (-0.0091964 -0.4370845 0.04867543)
    Marker RMMAL: tibia_r (0.01291863 -0.4165392 -0.03723207)
    Marker RCAL: calcn_r (-0.01376604 0.03568145 -0.02063066)
    Marker RTOE: calcn_r (0.1981587 0.05667892 -0.01754564)
    Marker RMT5: calcn_r (0.1806844 0.00991991 0.07939569)
    Marker LTH1: femur_l (0.00429506 -0.1137381 -0.1013666)
    Marker LTH2: femur_l (0.06927882 -0.2121975 -0.07746401)
    Marker LTH3: femur_l (-0.0171666 -0.3323818 -0.07070959)
    Marker LLFC: femur_l (0.00482404 -0.4392505 -0.06778954)
    Marker LMFC: femur_l (0.00351226 -0.4435094 0.06026798)
    Marker LTB1: tibia_l (0.04870312 -0.1397257 -0.02702052)
    Marker LTB2: tibia_l (0.0051297 -0.2349765 -0.07494996)
    Marker LTB3: tibia_l (0.03810618 -0.3326676 -0.01259893)
    Marker LLMAL: tibia_l (-0.0091964 -0.4370845 -0.04867543)
    Marker LMMAL: tibia_l (0.01291863 -0.4165392 0.03723207)
    Marker LCAL: calcn_l (-0.01376604 0.03568145 0.02063066)
    Marker LTOE: calcn_l (0.1981587 0.05667892 0.01754564)
    Marker LMT5: calcn_l (0.1806844 0.00991991 -0.07939569)
  ContactGeometrySet:
    ContactHalfSpace floor: socket_frame=/ground orientation=(0 0 -1.570796)
    ContactSphere heel_r: socket_frame=/bodyset/calcn_r location=(0.0146421 -0.025 -0.0122799) radius=0.035
    ContactSphere lateralMidfoot_r: socket_frame=/bodyset/calcn_r location=(0.153362 -0.01 0.0594829) radius=0.035
    ContactSphere medialToe_r: socket_frame=/bodyset/toes_r location=(0.074363 -0.01 -0.026039) radius=0.035
    ContactSphere medialMidfoot_r: socket_frame=/bodyset/calcn_r location=(0.203637 -0.01 -0.0398688) radius=0.035
    ContactSphere heel_l: socket_frame=/bodyset/calcn_l location=(0.0146421 -0.025 0.0122799) radius=0.035
    ContactSphere lateralMidfoot_l: socket_frame=/bodyset/calcn_l location=(0.153362 -0.01 -0.0594829) radius=0.035
    ContactSphere medialToe_l: socket_frame=/bodyset/toes_l location=(0.074363 -0.01 0.026039) radius=0.035
    ContactSphere medialMidfoot_l: socket_frame=/bodyset/calcn_l location=(0.203637 -0.01 0.0398688) radius=0.035
